# Основные параметры
# Удельные объёмы:
# Теплоёмкости
kJ := 1000 J
ν_313_15.7_ρ := 1.4322*10^-3*m^3/kg
C_p_295_15.7 := 5337.7*J/(kg*Δ°C)
ν_277_15.7_ρ := 1.2992*10^-3*m^3/kg
C_p_пп_271_3.8 := 3137.2*J/(kg*Δ°C)
ν_1_295_15.7_ρ := 1.357*10^-3*m^3/kg
C_p_эк.уч_176_3.8 := 4378.3*J/(kg*Δ°C)
ν_105_3.8_ρ := 1.0455*10^-3*m^3/kg  # Теплота парообразования
v_ср := 2.76*m/s
ν_176_3.8_ρ := 1.1197*10^-3*m^3/kg
r_3.8 := 1729*kJ/kg
ν_1 == 1.357*10^-3*m^3/kg  # Удельный объём для первого контура
ν_140_3.8_ρ := 1.0776*10^-3*m^3/kg  # Параметры реактора
ν_105 == (1.0455*10^-3) m^3/kg  # Удельный объём для второго контура вода
ν_212_3.8_ρ := 1.174*10^-3*m^3/kg  # Электрическая мощность
ν_295 == (6.1559*10^-2) m^3/kg  # Удельный объём для второго контура пар
ν_247_3.8_вода_ρ := 1.2456*10^-3*m^3/kg
W_эл := 315*MW
# J/(kg*Δ°C) | kJ/kg
ν_247_вода_ρ := 1.2456*10^-3*m^3/kg  # Температура на входе и выходе
ν_247_пар_ρ := 5.2468*10^-2*m^3/kg
T_вход := 313 °C
ν_247_3.8_пар_ρ := 5.2472*10^-2*m^3/kg
T_выход := 277 °C
ν_271_3.8_ρ := 5.7281*10^-2*m^3/kg  # Давления 1 и 2 контуров
ν_295_3.8_ρ := 6.1559*10^-2*m^3/kg
p_внутр := 15.7 MPa
p_внеш := 3.8 MPa
# Кинематические вязкости:
# Механические параметры оборудования
ρ_1_вход_313_15.7 := ν_1_вход_313_15.7_ρ^-1
ν_140_3.8 := 2.1274*10^-7*m^2/s
η_ЭГ := 0.98
ρ_1_выход_277_15.7 := ν_1_выход_277_15.7_ρ^-1
ν_247_3.8_пар := 9.1268*10^-7*m^2/s
η_Механ := 0.97
ρ_ср_1_контура := ν_1_295_15.7_ρ^-1 = 736.92 kg/m^3
ν_271_3.8 := 1.062*10^-6*m^2/s
η_0i := 0.85
ν_105_3.8 := 2.8082*10^-7*m^2/s
η_ИТ := 0.98
ν_176_3.8 := 1.7297*10^-7*m^2/s  # Параметры износа
v_коррозии := 0.002
# Наружный диаметр труб
ν_212_3.8 := 1.4887*10^-7*m^2/s
T_службы := 40
ν_247_3.8 := 1.3371*10^-7*m^2/s
# Параметры прочности
ν_247_3.8_вода := 1.3371*10^-7*m^2/s
σ_Н := 200 MPa
ν_295_3.8 := 1.2107*10^-6*m^2/s
φ := 1
# Коэффициент прочности
ν_295_15.7 := 1.2285*10^-7*m^2/s
# Управляющие параметры
# Теплопроводности
N_парогенераторов := 10
λ_295_15.7 := 0.569*W/(m*K)
n_регенеративных_подогревателей := 7
# Коэфициент запаса
λ_247_3.8_вода := 0.68707*W/(m*K)
d_наружный_пагоренератора := 820 mm
λ_247_3.8_пар := 5.0376*10^-2*W/(m*K)
δ_ст_парогенератора := 10 mm
λ_271_3.8 := 4.8973*10^-2*W/(m*K)
d_трубки := 16 mm
λ_стенки_трубки := 25*W/(m*K)
δ_ст_трубки
λ_140_3.8 := 0.68707 W/(m*K)
# Числа Прандтля | N_труб_на_диаметре
Pr_295_15.7 := 0.84927
l_к_запас := 1.2
Pr_247_3.8 := 1.2286
Pr_140_3.8 := 1.2286
Pr_247_3.8_пар := 1.3604
Pr_271_3.8 := 1.187
table  # each column defines a variable
    Точка | T (°C) | P (MPa) | s (J/(kg*K)) | h (kJ/kg) | x
    "a" | 30.1 | 3.8 | 436.8 | 129.9 | "-"
    "b" | 247.3 | 3.8 | 2769 | 1072.7 | 0
    "c" | 247.3 | 3.8 | 6091 | 2801.8 | 1
    "c'" | 295 | 3.8 | 6372.4 | 2954.5 | "-"
    "d" | 92 | 0.075 | 6372.4 | 2268.3 | 0.8268
    "e" | 92 | 0.076 | 7452.6 | 2662.8 | 1
    "k" | 30 | 0.004 | 7452.6 | 2252.6 | 0.8753
    "k'" | 30 | 0.004 | 436.79 | 125.8 | 0
    "g" | 92 | 0.075 | 1215.8 | 385.4 | 0
    "h" | 105 | 3.8 | 1360.2 | 442.9 | "-"
end table
# Начальные данные
table  # each column defines a variable
    Точка | T (°C) | P (MPa) | s (J/(kg*K)) | h (kJ/kg) | x
    "a" | 30.174 | 3.8 | 436.79 | 129.93 | "-"
    "b" | 247.33 | 3.8 | 2769 | 1072.7 | 0
    "c" | 247.33 | 3.8 | 6091 | 2801.8 | 1
    "c'" | 295 | 3.8 | 6372.4 | 2954.5 | "-"
    "d" | 92 | 0.075685 | 6372.4 | 2268.3 | 0.8268
    "e" | 92 | 0.075685 | 7452.6 | 2662.8 | 1
    "k" | 30 | 0.0042467 | 7452.6 | 2252.6 | 0.8753
    "k'" | 30 | 0.0042467 | 436.79 | 125.75 | 0
    "g" | 92 | 0.075685 | 1215.8 | 385.38 | 0
    "h" | 105 | 3.8 | 1360.2 | 442.94 | "-"
end table
T_a := T[0]
P_a := P[0]
s_a := s[0]
h_a := h[0]
x_a := x[0]
T_b := T[1]
P_b := P[1]
s_b := s[1]
h_b := h[1]
x_b := x[1]
T_c := T[2]
P_c := P[2]
s_c := s[2]
h_c := h[2]
x_c := x[2]
T_c' := T[3]
P_c' := P[3]
s_c' := s[3]
h_c' := h[3]
x_c' := x[3]
T_d := T[4]
P_d := P[4]
s_d := s[4]
h_d := h[4]
x_d := x[4]
T_e := T[5]
P_e := P[5]
s_e := s[5]
h_e := h[5]
x_e := x[5]
T_k := T[6]
P_k := P[6]
s_k := s[6]
h_k := h[6]
x_k := x[6]
T_k' := T[7]
P_k' := P[7]
s_k' := s[7]
h_k' := h[7]
x_k' := x[7]
T_g := T[8]
P_g := P[8]
s_g := s[8]
h_g := h[8]
x_g := x[8]
T_h := T[9]
P_h := P[9]
s_h := s[9]
h_h := h[9]
x_h := x[9]
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# Расчёт КПД Брутто
η_t_0 := 1 - T_k*(s_e - s_a)*x_d/((h_c' - h_g) + (h_g - h_a)*x_d) = 0.36753
η_t_inf := 1 - T_k*(s_c' - s_h)/(h_c' - h_h) = 0.395018
1 - 303.15 K*((7.4526*10^3) J/(kg*K) - 436.8 J/(kg*K))*0.8268/(((2.9545*10^6) m^2/s^2 - (3.854*10^5) m^2/s^2) + ((3.854*10^5) m^2/s^2 - (1.299*10^5) m^2/s^2)*0.8268) = 0.367535
# Возьмём
n_регенеративных_подогревателей = 7
1 - 303.15 K*((6.3724*10^3) m^2/(s^2*K) - (1.3602*10^3) m^2/(s^2*K))/((2.9545*10^6) m^2/s^2 - (4.429*10^5) m^2/s^2) = 0.395028
# Параметры КПД механических устройств:
η_ЭГ = 0.98
η_Механ = 0.97
η_0i = 0.85
η_ИТ = 0.98
0.3675 + 7/(7 + 1)*(0.395 - 0.3675) = 0.391563
η_t_n := η_t_0 + n_регенеративных_подогревателей/(n_регенеративных_подогревателей + 1)*(η_t_inf - η_t_0) = 0.391582
0.98*0.97*0.85*0.98*0.3916 = 0.310088
η_Брутто := η_ЭГ*η_Механ*η_0i*η_ИТ*η_t_n = 0.310074
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# Задача:
#
# имеется Латех код. в целом, он представляет собой почти готовое оформление расчёта
#
# однако, имеются недостатки, которые нужно исправить
#
# первое: сделать таблицу "параметры состояния рабочего тела" точь в точь как в документе с исходником расчёта - на данный момент таблица реализована не достаточно хорошо
#
# второе: сопровождать формулы текстовым описанием, основанным на четырёх методических пособиях. при необходимости в некоторых случаях проанализировать параметры и обосновать выбор эмпирической формулы. В общем, не жалеть описаний и обоснований.
#
# третье: в начале каждого этапа давать сводную таблицу используемых параметров с размерностью и названием. с размерностью аккуратно, размерности прописаны в исходнике расчёта. учти, что в исходнике числа имеют большее количество значащих цифр. я округлил в оформлении. однако, не сложно произвести сопоставление
#
# четвёртое: я бы хотел верхние индексы убрать, переместив их вниз наподобии тому, что сделано в конце латех кода - метод \substack. как правило, верхний индекс у меня содержит давление  - его нужно переместить на подобие тому, что реализовано в конце документа
# Расчёт T-Q диаграммы и материального-теплового баланса парогенератора
# Тепловая мощность реактора.
Q_реактора := W_эл/η_Брутто = 1015.89 MW  # Где W_эл = 315 MW, η_Брутто = 0.310074
# Мощность парогенератора
Q_реактора = 1015.89 MW
Q_парогенератора := Q_реактора/N_парогенераторов = 101.589 MW
N_парогенераторов = 10
# Расход первого контура:
# Количество тепла, отданного теплоносителем 1-го контура:
Q_парогенератора == C_p_295_15.7*G_1*(T_вход - T_выход)
# Где
# Q_парогенератора = 101.589 MW
# C_p_295_15.7 = 5337.7 J/(kg*Δ°C) - Теплоёмкость теплоносителя первого контура
# T_вход = 313 °C - Температура на входе в первый контур
# T_выход = 277 °C - Температура на выходе из первого контура
# Расход для одного парогенератора:
G_1 := Q_парогенератора/(C_p_295_15.7*(T_вход - T_выход)) = 528.674 kg/s
# Тепловые мощности для Экономайзерного, испарительного и пароперегревательного участков:
# Экономайзерный участок:
Q_экономайзерный(G_2) := G_2*C_p_эк.уч_176_3.8*(T_b - T_h)
C_p_эк.уч_176_3.8 = 4378.3 J/(kg*Δ°C)
T_b = 247.33 °C
T_h = 105 °C
(8.4657*10^7) W/((5.3377*10^3) J/(kg*Δ°C)*(313 °C - 277 °C)) = 440.561 kg/s
# Испарительный участок:
Q_парогенератора = 101.589 MW
Q_испарительный(G_2) := G_2*r_3.8
# Закон сохранения энергии:
r_3.8 = 1729 kJ/kg
Q_парогенератора == Q_экономайзерный + Q_испарительный + Q_пароперегревательный
C_p_пп_271_3.8 = 3137.2 J/(kg*Δ°C)
# Отсюда
T_h = 105 °C
C_p_эк.уч_176_3.8 = 4378.3 J/(kg*Δ°C)
T_c = 247.33 °C
G_2 := Q_парогенератора/(C_p_эк.уч_176_3.8*(T_b - T_h) + r_3.8 + C_p_пп_271_3.8*(T_c' - T_c)) = 40.6076 kg/s
C_p_пп_271_3.8 = 3137.2 J/(kg*Δ°C)
(295 °C - 247.33 °C)
# Тогда:
(8.4657*10^7) W/((4.3783*10^3) J/(kg*Δ°C)*(247.33 °C - 105 °C) + (1.729*10^3) kJ/kg + (3.1372*10^3) J/(kg*Δ°C)*(295 °C - 247.33 °C)) = 33.8396 kg/s
Q_экономайзерный(G_2) = 25.3052 MW  # Где G_2 = 40.6076 kg/s-расход второго контура
Q_испарительный(G_2) = 70.2106 MW
Q_экономайзерный(G_2) + Q_испарительный(G_2) = 95515725 W
Q_пароперегревательный := G_2*C_p_пп_271_3.8*(T_c' - T_c) = 6.07288 MW
C_p_пп_271_3.8 = 3137.2 J/(kg*Δ°C)
247.33 °C - 105 °C = 142.33 K
T_c' = 295 °C
(33.8397 kg/s)*(4.3783*10^3) J/(kg*Δ°C)*(247.33 °C - 105 °C) = 21.0877 MW
T_c = 247.33 °C
Q_экономайзерный(G_2) := G_2*C_p_эк.уч_176_3.8*(T_b - T_h)
(33.8397 kg/s)*(1.729*10^3) kJ/kg = 58.5088 MW
Q_пароперегревательный := Q_парогенератора - (Q_экономайзерный(G_2) + Q_испарительный(G_2)) = 6.07288 MW
(33.8397 kg/s)*(3.1372*10^3) J/(kg*Δ°C)*(295 °C - 247.33 °C) = 5.06074 MW
T_c' = 295 °C
T_c = 247.33 °C
84.65717 MW/((4.3783*10^3) J/(kg*Δ°C)*(247.33 °C - 105 °C) + (1.729*10^3) kJ/kg + (3.1372*10^3) J/(kg*Δ°C)*(295 °C - 247.33 °C)) = 33.8397 kg/s
(T_b - T_h)
C_p_пп_271_3.8 = 3137.2 J/(kg*Δ°C)
r_3.8 = 1729 kJ/kg
# Определение скоростей движения теплоносителя, рабочего тела и их проходных сечений
p_расч := 1.25*(p_внутр - p_внеш) = 14.875 MPa
# Где
# p_внутр = 15.7 MPa - Давление первого контура
# p_внеш = 3.8 MPa - Давление второго контура
# Минусовой допуск на толщину стенки
c_1_трубки := 0.1*p_расч*d_трубки/(2*φ*σ_Н + p_расч) = 5.73667e-5 m
# Где
# p_расч = 14.875 MPa - Расчётное давление
# d_трубки = 16 mm - Внешний диаметр трубки
# φ = 1
# σ_Н = 200 MPa- Предел прочности
# Уточнение на влияние коррозии
c_2_трубки := v_коррозии*T_службы*mm = 0.08 mm
# Где
# v_коррозии = 0.002мм*лет^-1
# T_службы = 40Лет
# Утолщение обусловленное технологией изготовления
c_3_трубки := 0*mm
# Утолщение в месте изгиба(приовальность 0.12)
0.12*14.875 MPa*16 mm/(2*1*200 MPa + 14.875 MPa) = 0.06884 mm
c_4_трубки := 0.12*p_расч*d_трубки/(2*φ*σ_Н + p_расч)
# Где
# p_расч = 14.875 MPa - Расчётное давление
# d_трубки = 16 mm - Внешний диаметр трубки
# φ = 1
# σ_Н = 200 MPa- Предел прочности
# Шаг между центрами отверстий
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d_трубки
t := l_к_запас*d_трубки = 0.0192 m
# Где
# l_к_запас = 1.2 - Коэффициент шага
# d_трубки = 16 mm - Внешний диаметр трубки
# Полная прибавка к толщине стенки
14.875 MPa*16 mm/(2*1*200 MPa + 14.875 MPa) + 0.2062 mm = 0.779867 mm
c_трубки := c_1_трубки + c_2_трубки + c_3_трубки + c_4_трубки = 0.206207 mm
16 mm - 2*3.2 mm = 9.6 mm
# Расчётная толщина стенок трубок:
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δ_расч_трубки := p_расч*d_трубки/(2*φ*σ_Н + p_расч) + c_трубки = 0.779873 mm
p_расч = 14.875 MPa
d_трубки = 16 mm
δ_ст_трубки := 0.8 mm
# Возьмём
δ_ст_трубки := 3.2 mm
# Внутренний диаметр труб:
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d_вн_трубки := d_трубки - 2*δ_ст_трубки = 0.0096 m
# Площадь проходного сечения:
f := π*d_вн_трубки^2/4 = 7.23823e-5 m^2
π*(9.6 mm)^2/4 = 72.3823 mm^2
# Кожух парогенератора
# Наружный диаметр парогенератора:
d_наружный_пагоренератора = 820 mm
# Толщина стенки кожуха парогенератора:
δ_ст_парогенератора = 10 mm
# Тогда, внутренний диаметр парогенератора:
# По ГОСТ 8734-75 наименьшая толщина стенки при наружном диаметре 820 мм:
d_вн_парогенератора := d_наружный_пагоренератора - 2*δ_ст_парогенератора = 800 mm
# Найдем количество трубок на диаметре парогенератора
d_трубки = 16 mm
N_труб_на_диаметре := d_вн_парогенератора/(l_к_запас*d_трубки) = 41.6667
# Округлим до нечётного числа в меньшую сторону:
N_труб_на_диаметре := 41
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l_к_запас = 1.2
# Найдем максимальное (в случае РИТМ-400 смысла в оценке нет) количество трубок внутри одного парогенератора
37
d_вн_парогенератора
N_труб_парогенератора := 3/4*(N_труб_на_диаметре^2 - 1) + 1 = 1261
n_0 := N_труб_парогенератора = 1261
720 mm - 2*3.5 mm = 713 mm
# Найдём площадь проходного сечения первого контура (площадь "решета")
713 mm/(1.2*16 mm) = 37.1354
d_вн_парогенератора = 800 mm
S_межтрубного := π*d_вн_парогенератора^2/4 - π*d_трубки^2*n_0/4 = 0.249116 m^2
d_трубки = 16 mm
3/4*(N_труб_на_диаметре^2 - 1) + 1
# Скорость теплоносителя первого контура. Тут будет площадь "решета"
v_1_контура_средняя := G_1*ν_1_295_15.7_ρ/S_межтрубного = 2.87983 m/s
G_1 = 528.674 kg/s
ν_1_295_15.7_ρ = 0.001357 m^3/kg
S_межтрубного = 0.249116 m^2
3/4*(37^2 - 1) + 1 = 1027
# Средние скорости пара и воды второго контура. (Второй контур в трубках)
# Средняя скорость воды второго контура:
π*d_вн_парогенератора^2/4 - π*d_трубки^2*n_0/4
v_2_контура_вода := G_2*ν_176_3.8_ρ/(n_0*f) = 0.498152 m/s
G_2 = 40.6076 kg/s
ν_176_3.8_ρ = 0.0011197 m^3/kg
n_0 = 1261
f = 72.3823 mm^2
# Скорость пара на выходе из второго контура:
v_1_контура == G_1*ν_1/S_межтрубного =  # error: Эта переменная не определена. Проверьте правильность установки обозначения.
v_2_контура_пар := G_2*ν_295_3.8_ρ/(n_0*f) = 27.3874 m/s
ν_295_3.8_ρ = 0.061559 m^3/kg
π*(713 mm)^2/4 - π*1027*(16 mm)^2/4 = 0.192781 m^2
# Гидравлический диаметр
d_гидрЫЫЫ := 4*S_межтрубного/(π*(d_вн_парогенератора + d_трубки*n_0)) = 15.1213 mm
(33.8397 kg/s)*(1.1197*10^-3) m^3/kg/(1027*72.3823 mm^2) = 0.509713 m/s
(440.5621 kg/s)*(1.357*10^-3) m^3/kg/(0.1928 m^2) = 3.10084 m/s
(33.8397 kg/s)*(0.0616 m^3/kg)/(1027*72.3823 mm^2) = 28.0417 m/s
2.1678
0.4
22.1268
# Определение среднелогарифмического температурного напора. TQ - Диаграмма
table  # each column defines a variable
    T_1 | Q_1
    T_выход | 0
    T_вход | Q_парогенератора
end table
table  # each column defines a variable
    T_2 | Q_2
    T_h | 0*W
    T_c | Q_экономайзерный(G_2)
    T_c | Q_экономайзерный(G_2) + Q_испарительный(G_2)
    T_c' | Q_парогенератора
end table
Q_1 = [0; 101588606] W
T_1 = [277; 313] °C
Q_2 = [0; 25305175; 95515725; 101588606] W
T_2 = [105; 247.33; 247.33; 295] °C
# [plot: T_1 (°C), T_2 (°C) vs Q_1, Q_2]
# разобьём T-Q диаграмму на 5 участков:
T_1_контура(Q) := (T_1[1] - T_1[0])/(Q_1[1] - Q_1[0])*Q + T_1[0]
ΔT_лог_i_участка(ΔT_max_i, ΔT_min_i) := (ΔT_max_i - ΔT_min_i)/ln(ΔT_max_i/ΔT_min_i)
# Определим перепады температур для пяти участков:
T_1_контура(Q_2[0]) = 277 °C
T_2[0] = 105 °C
ΔT_max_1 := T_1_контура(Q_2[0]) - T_2[0] = 172 K
ΔT_min_1 := T_1_контура(0.5*Q_2[1]) - (T_2[0] + 0.5*(T_2[1] - T_2[0])) = 105.319 K
T_1_контура(0.5*Q_2[1]) = 281.484 °C
(T_2[0] + 0.5*(T_2[1] - T_2[0])) = 176.165 °C
ΔT_max_2 := T_1_контура(0.5*Q_2[1]) - (T_2[0] + 0.5*(T_2[1] - T_2[0])) = 105.319 K
ΔT_min_2 := T_1_контура(Q_2[1]) - T_2[1] = 38.6374 K
T_1_контура(Q_2[1]) = 285.967 °C
T_2[1] = 247.33 °C
T_1_контура(0.5*Q_2[1]) = 281.484 °C
(T_2[0] + 0.5*(T_2[1] - T_2[0])) = 176.165 °C
ΔT_max_3 := T_1_контура(Q_2[1] + 0.5*(Q_2[2] - Q_2[1])) - T_2[2] = 51.0777 K
ΔT_min_3 := T_1_контура(Q_2[1]) - T_2[1] = 38.6374 K
T_1_контура(Q_2[1]) = 285.967 °C
T_2[1] = 247.33 °C
T_1_контура(Q_2[1] + 0.5*(Q_2[2] - Q_2[1])) = 298.408 °C
T_2[2] = 247.33 °C
ΔT_max_4 := T_1_контура(Q_2[2]) - T_2[2] = 63.518 K
ΔT_min_4 := T_1_контура(Q_2[1] + 0.5*(Q_2[2] - Q_2[1])) - T_2[2] = 51.0777 K
T_1_контура(Q_2[1] + 0.5*(Q_2[2] - Q_2[1])) = 298.408 °C
T_2[2] = 247.33 °C
ΔT_max_5 := T_1_контура(Q_2[2]) - T_2[2] = 63.518 K
ΔT_min_5 := T_1_контура(Q_2[3]) - T_2[3] = 18 K
T_1_контура(Q_2[3]) = 313 °C
T_2[3] = 295 °C
T_1_контура(Q_2[2]) = 310.848 °C
T_2[2] = 247.33 °C
# Среднелогарифмический температурный напор
T_1_контура(Q_2[2]) = 310.848 °C
T_2[2] = 247.33 °C
ΔT_лог_1_участка := ΔT_лог_i_участка(ΔT_max_1, ΔT_min_1) = 135.945 K
ΔT_лог_2_участка := ΔT_лог_i_участка(ΔT_max_2, ΔT_min_2) = 66.4971 K
ΔT_лог_3_участка := ΔT_лог_i_участка(ΔT_max_3, ΔT_min_3) = 44.5685 K
ΔT_лог_4_участка := ΔT_лог_i_участка(ΔT_max_4, ΔT_min_4) = 57.072 K
ΔT_лог_5_участка := ΔT_лог_i_участка(ΔT_max_5, ΔT_min_5) = 36.0981 K
# J/(kg*Δ°C) | kJ/kg
W/(m^2*K)
d_вн_парогенератора = 800 mm
d_трубки = 16 mm
n_0 = 1261
# Расчет коэффициента теплоотдачи первого контура
# из параметров ПЕРВОГО контура при помощи таблиц свойств воды и водяного пара определим кинематическую вязкость, число Прандтля, теплопроводность и вычислим число Рейнольдса, число Нуссельта, коэффициент теплопроводности
d_вн_парогенератора = 0.8 m
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ν_295_15.7 = 1.2285e-7 m^2/s
Pr_295_15.7 = 0.84927
S_межтрубного = 0.249116 m^2
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λ_295_15.7 = 0.569 W/(m*K)
d_трубки = 0.016 m
d_экв := 4*S_межтрубного/(π*(d_вн_парогенератора + d_трубки*n_0)) = 15.1213 mm  # Эквивалентный диаметр
S_межтрубного = 0.249116 m^2
d_вн_парогенератора = 0.8 m
n_0 = 1261
d_трубки = 16 mm
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Re_1 := v_1_контура_средняя*d_экв/ν_295_15.7 = 354471
ν_295_15.7 = 1.2285e-7 m^2/s
n_0 = 1261
Nu_1 := 0.023*Re_1^0.8*Pr_295_15.7^0.4 = 592.94
4*0.1928 m^2/(π*(713 mm + 16 mm*1027)) = 14.3179 mm
λ_295_15.7 = 0.569 W/(m*K)
d_экв = 15.1213 mm
α_1 := Nu_1*λ_295_15.7/d_экв = 22311.8 W/(m^2*K)
δ_ст_трубки = 0.0032 m
δ_ст_трубки/λ_стенки_трубки = 0.000128 s^3*K/kg
λ_стенки_трубки = 25 kg*m/(s^3*K)
# Расчет коэффициента теплоотдачи, плотности теплового потока для второго контура на участках 2, 3. Определение соответствующих коэффициентов теплопередачи. Итерационный метод.
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(3.1011 m/s)*14.3165 mm/((1.2285*10^-7) m^2/s) = 361391
M_2 :=
    M_2[2] ← 150000
    for i ∈ 0, 1 .. 300
        α_2[i] ← 4.34*M_2[2]^0.7*(3.8^0.14 + 0.0135*3.8^2)
        k_2[i] ← 1/(1/(α_1*(kg/(s^3*K))^-1) + δ_ст_трубки/λ_стенки_трубки*(s^3*K/kg)^-1 + 1/α_2[i])
        M_2[0] ← α_2[i]
        M_2[1] ← k_2[i]
        M_2[2] ← k_2[i]*ΔT_лог_2_участка*K^-1
    M_2[0] ← M_2[0]*W/(m^2*K)
    M_2[1] ← M_2[1]*W/(m^2*K)
    M_2[2] ← M_2[2]*W/m^2
    return M_2
    = [45386.2 kg/(s^3*K); 5132.09 kg/(s^3*K); 341269 kg/s^3]
M_3 :=
    M_3[2] ← 150000
    for i ∈ 0, 1 .. 200
        α_3[i] ← 4.34*M_3[2]^0.7*(3.8^0.14 + 0.0135*3.8^2)
        k_3[i] ← 1/(1/(α_1*(kg/(s^3*K))^-1) + δ_ст_трубки/λ_стенки_трубки*(s^3*K/kg)^-1 + 1/α_3[i])
        M_3[0] ← α_3[i]
        M_3[1] ← k_3[i]
        M_3[2] ← k_3[i]*ΔT_лог_3_участка*K^-1
    M_3[0] ← M_3[0]*W/(m^2*K)
    M_3[1] ← M_3[1]*W/(m^2*K)
    M_3[2] ← M_3[2]*W/m^2
    return M_3
    = [33352.3 kg/(s^3*K); 4930.91 kg/(s^3*K); 219763 kg/s^3]
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W/(m^2*K)
# Итого:
α_2_2_участка := M_2[0] = 45386.2 W/(m^2*K)
α_2_3_участка := M_3[0] = 33352.3 W/(m^2*K)
k_2 := M_2[1] = 5132.09 W/(m^2*K)
k_3 := M_3[1] = 4930.91 W/(m^2*K)
W/(m^2*K)
q_f_2_участок := M_2[2] = 341269 W/m^2
q_f_3_участок := M_3[2] = 219763 W/m^2
# Разобьём T-Q диаграмму на 5 участков: для каждого участка определим коэффициент теплоотдачи второго контура
# из параметров ПЕРВОГО контура при помощи таблиц свойств воды и водяного пара определим кинематическую вязкость, число Прандтля, теплопроводность и вычислим число Рейнольдса, число Нуссельта
(0.50971 m/s)*9.6 mm/((2.1274*10^-7) m^2/s) = 23000.9
# 1 участок однофазная вода
T_1_1_участка_max := T_2[1] - 0.5*(T_2[1] - T_2[0]) = 176.165 °C
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T_1_1_участка_min := T_2[0] = 105 °C
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(T_1_1_участка_max + T_1_1_участка_min)/2 = 140.582 °C
ν_140_3.8 = 2.1274e-7 m^2/s
λ_140_3.8_вода := 0.68707 W/(m*K)
Pr_140_3.8 = 1.2286
ν_140_3.8_ρ = 0.0010776 m^3/kg
λ_140_3.8 = 0.68707 W/(m*K)
v_2_контура_вода_1_участок := G_2*ν_140_3.8_ρ/(n_0*f) = 0.479422 m/s
Re_2_1 := v_2_контура_вода_1_участок*d_вн_трубки/ν_140_3.8 = 21634.1
v_2_контура_вода = 0.498152 m/s
d_вн_трубки = 9.6 mm
ν_140_3.8 = 2.1274e-7 m^2/s
Nu_2_1 := 0.023*Re_2_1^0.8*Pr_140_3.8^0.4 = 73.3844
α_2_1_участка := Nu_2_1*λ_140_3.8/d_вн_трубки = 5252.11 W/(m^2*K)
n_0 = 1261
f = 72.3823 mm^2
G_2 = 40.6076 kg/s
# 2 участок кипение в большом объёме
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T_1_2_участка_max := T_2[1] = 247.33 °C
T_1_2_участка_min := T_2[1] - 0.5*(T_2[1] - T_2[0]) = 176.165 °C
(T_1_2_участка_max + T_1_2_участка_min)/2 = 211.748 °C
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# 3 участок кипение в большом объёме
T_1_3_участка_max := T_2[1] = 247.33 °C
T_1_3_участка_min := T_2[2] = 247.33 °C
(T_1_3_участка_max + T_1_3_участка_min)/2 = 247.33 °C
# 4 участок однофазный пар
# снабдим константы дополнительным индексом "пар", так как параметры определены вблизи границы двухфазного состояния
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T_1_4_участка_max := T_2[2] = 247.33 °C
T_1_4_участка_min := T_2[1] = 247.33 °C
(T_1_4_участка_max + T_1_4_участка_min)/2 = 247.33 °C
ν_247_3.8_пар = 9.1268e-7 m^2/s
v_2_контура_вода_4 := G_2*ν_247_вода_ρ/(n_0*f) = 0.554164 m/s
n_0 = 1261
Pr_247_3.8_пар = 1.3604
λ_247_3.8_пар = 0.050376 W/(m*K)
f = 7.23823e-5 m^2
v_2_контура_пар_4 := G_2*ν_247_пар_ρ/(n_0*f) = 23.3429 m/s
ν_247_пар_ρ = 0.052468 m^3/kg
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G_2 = 40.6076 kg/s
Re_2_4 := v_2_контура_пар_4*d_вн_трубки/ν_247_3.8_пар = 245531
ν_247_3.8_пар = 9.1268e-7 m^2/s
Nu_2_4 := 0.023*Re_2_4^0.8*Pr_247_3.8_пар^0.4 = 533.679
ν_247_3.8_пар := □  # error: Отсутствует элемент или выражение.
d_вн_трубки = 9.6 mm
λ_247_3.8_пар = 0.050376 W/(m*K)
α_2_4_участка := Nu_2_4*λ_247_3.8_пар/d_вн_трубки = 2800.48 W/(m^2*K)
Pr_247_3.8_пар := □  # error: Отсутствует элемент или выражение.
v_2_контура_пар = 27.3874 m/s
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λ_247_3.8_пар := □  # error: Отсутствует элемент или выражение.
# 5 участок однофазный пар
T_1_5_участка_max := T_2[3] = 295 °C
T_1_5_участка_min := T_2[2] = 247.33 °C
(T_1_5_участка_max + T_1_5_участка_min)/2 = 271.165 °C
ν_271_3.8 = 1.062e-6 m^2/s
v_2_контура_пар_5_участок := G_2*ν_271_3.8_ρ/(n_0*f) = 25.4842 m/s
ν_271_3.8_ρ = 0.057281 m^3/kg
Pr_271_3.8 = 1.187
λ_271_3.8 = 0.048973 W/(m*K)
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Re_2_5 := v_2_контура_пар_5_участок*d_вн_трубки/ν_271_3.8 = 230365
ν_271_3.8 = 1.062e-6 m^2/s
W/(m*K)
Nu_2_5 := 0.023*Re_2_5^0.8*Pr_271_3.8^0.4 = 480.222
α_2_5_участка := Nu_2_5*λ_271_3.8/d_вн_трубки = 2449.78 W/(m^2*K)
λ_271_3.8 = 0.048973 W/(m*K)
# [plot: T_1 (°C), T_2 (°C) vs Q_1, Q_2]
# Определение коэффициентов теплопередачи для каждых пяти участков
# Вычислим тепловые мощности на каждом из пяти участков:
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Q.1 := 0.5*(Q_2[1] - Q_2[0]) = 12.6526 MW
Q_2[3] = 101588606 W
Q.2 := 0.5*(Q_2[1] - Q_2[0]) = 12.6526 MW
Q_2[2] = 95515725 W
Q_3 := 0.5*(Q_2[2] - Q_2[1]) = 35.1053 MW
Q_2[3] - Q_2[2] = 6.07288 MW
Q_4 := 0.5*(Q_2[2] - Q_2[1]) = 35.1053 MW
Q_5 := 1*(Q_2[3] - Q_2[2]) = 6.07288 MW
# Вычислим коэффициенты теплопередачи:
k_1_участок := 1/(1/α_1 + δ_ст_трубки/λ_стенки_трубки + 1/α_2_1_участка) = 2753.16 W/(m^2*K)
λ_стенки_трубки = 25 W/(m*K)
α_1 = 22311.8 kg/(s^3*K)
k_2_участок := 1/(1/α_1 + δ_ст_трубки/λ_стенки_трубки + 1/α_2_2_участка) = 5132.09 W/(m^2*K)
δ_ст_трубки = 3.2 mm
δ_ст_трубки/λ_стенки_трубки = 0.000128 m^2*K/W
λ_стенки_трубки = 25 W/(m*K)
W/(m^2*K)
m^2*K/W
k_3_участок := 1/(1/α_1 + δ_ст_трубки/λ_стенки_трубки + 1/α_2_3_участка) = 4930.91 kg/(s^3*K)
α_2_1_участка = 5252.11 W/(m^2*K)
α_2_2_участка = 45386.2 W/(m^2*K)
k_4_участок := 1/(1/α_1 + δ_ст_трубки/λ_стенки_трубки + 1/α_2_4_участка) = 1887.15 W/(m^2*K)
α_2_3_участка = 33352.3 W/(m^2*K)
α_2_4_участка = 2800.48 W/(m^2*K)
α_2_5_участка = 2449.78 W/(m^2*K)
k_5_участок := 1/(1/α_1 + δ_ст_трубки/λ_стенки_трубки + 1/α_2_5_участка) = 1721.11 W/(m^2*K)
# Где δ_ст_трубки/λ_стенки_трубки = 0.000128 s^3*K/kg
# Вычислим площади поверхности n труб на участках:
F_i(Q_i, k_i, ΔT_лог_i) := Q_i/(k_i*ΔT_лог_i)
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F_1 := F_i(Q.1, k_1_участок, ΔT_лог_1_участка) = 33.8054 m^2
Q.1 = 12.6526 MW
k_1_участок = 2.75316 kW/(m^2*K)
ΔT_лог_1_участка = 135.945 K
F_2 := F_i(Q.2, k_2_участок, ΔT_лог_2_участка) = 37.0751 m^2
Q.2 = 12.6526 MW
k_2_участок = 5.13209 kW/(m^2*K)
ΔT_лог_2_участка = 66.4971 K
F_3 := F_i(Q_3, k_3_участок, ΔT_лог_3_участка) = 159.741 m^2
Q_3 = 35.1053 MW
k_3_участок = 4.93091 kW/(m^2*K)
ΔT_лог_3_участка = 44.5685 K
F_4 := F_i(Q_4, k_4_участок, ΔT_лог_4_участка) = 325.945 m^2
Q_4 = 35.1053 MW
k_4_участок = 1.88715 kW/(m^2*K)
ΔT_лог_4_участка = 57.072 K
F_5 := F_i(Q_5, k_5_участок, ΔT_лог_5_участка) = 97.7463 m^2
Q_5 = 6.07288 MW
k_5_участок = 1.72111 kW/(m^2*K)
ΔT_лог_5_участка = 36.0981 K
# Тогда, суммарная площадь n труб:
F := F_1 + F_2 + F_3 + F_4 + F_5 = 654.313 m^2
L := F/(π*d_трубки*n_0) = 10.3229 m
d_трубки = 16 mm
n_0 = 1261
# Длинны труб отдельно по участкам:
L_1 := F_1/(π*d_трубки*n_0) = 533.336 mm
0.52747 m
π*d_трубки*n_0 = 63.3848 m
L_2 := F_2/(π*d_трубки*n_0) = 584.922 mm
0.58836 m
L_3 := F_3/(π*d_трубки*n_0) = 2520.18 mm
2.53558 m
L_4 := F_4/(π*d_трубки*n_0) = 5142.32 mm
4.74927 m
L_5 := F_5/(π*d_трубки*n_0) = 1542.11 mm
1.48855 m
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# Определим мощность на прокачку для первого контура
# Определим (или напомним) вспомогательные параметры первого контура:
# Температуры входа и выхода. Средняя температура:
T_вход = 313 °C
T_выход = 277 °C
T_ср_1_контура := (T_выход + T_вход)/2 = 295 °C
# Расход первого контура:
G_1 = 528.674 kg/s
# Площадь межтрубного пространства:
S_межтрубного = 0.249116 m^2
ρ_1_вход_313_15.7 =  # error
# Удельный объём и плотность для первого контура на входе:
ν_313_15.7_ρ = 0.0014322 m^3/kg
ν_1_вход_313_15.7_ρ
ρ_1_выход_277_15.7 =  # error
# Удельный объём и плотность  для первого контура на выходе:
ν_277_15.7_ρ = 0.0012992 m^3/kg
# Средний удельный объём и плотность для первого контура:
ν_1_295_15.7_ρ = 0.001357 m^3/kg
# Давление первого контура:
P_1_контура := p_внутр = 15700000 Pa
# Площадь межтрубного пространства:
S_межтрубного = 0.249116 m^2
# Эквивалентный диаметр:
d_экв = 15.1213 mm
ρ_ср_1_контура = 736.92 kg/m^3
# Скорость теплоносителя первого контура на входе:
v_1_контура_вход := G_1*ν_313_15.7_ρ/S_межтрубного = 3.03942 m/s
ν_313_15.7_ρ = 0.0014322 m^3/kg
(v_1_контура_вход + v_1_контура_выход)/2 =  # error
# Скорость теплоносителя первого контура на выходе:
v_1_контура_выход := G_1*ν_277_15.7_ρ/S_межтрубного = 2.75717 m/s
ν_277_15.7_ρ = 0.0012992 m^3/kg
# Средняя скорость теплоносителя первого контура:
v_1_контура_средняя = 2.87983 m/s
S_межтрубного = 0.249116 m^2
v_1_контура_средняя = 2.87983 m/s
# Число Рейнольдса для первого контура:
Re_1 := v_1_контура_средняя*d_экв/ν_295_15.7 = 354471
v_1_контура_средняя = 2.87983 m/s
# коэффициент гидравлического сопротивления для первого контура (Re_1 > 10^5):
ξ_1 := 1/(1.82*log(Re_1) - 1.62)^2 = 0.0139054
ν_295_15.7 = 1.2285e-7 m^2/s
d_экв = 15.1213 mm
# коэффициент гидравлического сопротивления для дистанционирующей решётки:
ξ_решётки := 1.5
L = 10.3229 m
# Число дистанционирующих решёток:
N_решёток := 7
v_1_контура_средняя = 2.87983 m/s
# коэффициент полезного действия (КПД) насоса:
η_н := 0.85
ν_1_295_15.7_ρ = 0.001357 m^3/kg
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# Определим перепады давлений для первого контура:
(ν_1_295_15.7_ρ^-1) = 736.92 kg/m^3
# Потеря давления на трение о стенки:
ΔP_тр1 := ξ_1*L/d_экв*v_1_контура_средняя^2/(ν_1_295_15.7_ρ*2) = 29008.2 Pa
# Потеря давления на местных сопротивлениях.
# На входе:
ΔP_м1_вход := 2.3*v_1_контура_вход^2/(ν_313_15.7_ρ*2) = 7417.81 Pa
v_1_контура_вход = 3.03942 m/s
ν_313_15.7_ρ = 0.0014322 m^3/kg
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# На выходе:
ΔP_м1_выход := 2.3*v_1_контура_выход^2/(ν_277_15.7_ρ*2) = 6728.96 Pa
v_1_контура_выход = 2.75717 m/s
ν_277_15.7_ρ = 0.0012992 m^3/kg
# Потеря давления на гидростатическую составляющую:
ρ_1_выход_277_15.7 =  # error
ρ_1_вход_313_15.7 =  # error
ΔP_1_гидр := (ν_1_295_15.7_ρ^-1)*g*L = 74600.4 Pa
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# Потеря (или выигрыш) давления, обусловленные изменением скорости потока из-за изменения плотности среды на расчётном участке.
L = 10.3229 m
ΔP_уск_1 := (ρ_ср_1_контура*v_1_контура_средняя)^2*(ν_313_15.7_ρ - ν_277_15.7_ρ) = 598.999 Pa
v_1_контура_средняя = 2.87983 m/s
# Потеря давления на местных сопротивлениях для дистанционирующих решёток:
v_1_контура_средняя = 2.87983 m/s
ΔP_м_дист.решётки := N_решёток*ξ_решётки*v_1_контура_средняя^2/(ν_313_15.7_ρ*2) = 30401.1 Pa
N_решёток = 7
ξ_решётки = 1.5
ν_313_15.7_ρ = 0.0014322 m^3/kg
# Итого ΔP численно равны:
ΔP_тр1 = 29.0082 kPa
ΔP_м1_вход = 7.41781 kPa
ΔP_м1_выход = 6.72896 kPa
ΔP_м_дист.решётки = 30401.1 Pa
ΔP_уск_1 = 0.598999 kPa
ΔP_1_гидр = 74.6004 kPa
ΔN_1_контура =  # error
# Итого суммарная мощность на прокачку для первого контура:
(ΔP_тр1 + ΔP_м1_вход + ΔP_м1_выход - ΔP_1_гидр + ΔP_уск_1 + ΔP_м_дист.решётки) = -445.349 Pa
ΔN_1_контура := G_1/(ρ_ср_1_контура*η_н)*(ΔP_тр1 + ΔP_м1_вход + ΔP_м1_выход - ΔP_1_гидр + ΔP_уск_1 + ΔP_м_дист.решётки) = -0.000375881 MW
# Примем
ΔN_1_контура := 0*MW
# Мощность на прокачку — это электрическая (или механическая) мощность, которую необходимо подвести к насосу/циркулятору, чтобы преодолеть гидравлическое сопротивление парогенератора (или другого аппарата) и обеспечить заданный расход теплоносителя.
# Определим мощность на прокачку для второго контура. Рассматриваем всё то же разбиение второго контура на 5 участков:
# Определим (или напомним) вспомогательные параметры второго контура:
# Температуры входа и выхода. Средняя температура -
#
# 1 участок:
#
# 2 участок:
#
# 3 участок:
#
# 4 участок:
#
# 5 участок:
# [plot: T_1 (°C), T_2 (°C) vs Q_1, Q_2]
T_2_ср_1_участок := T_2[0] + ((T_2[0] + (T_2[1] - T_2[0])/2) - T_2[0])/2 = 140.582 °C
T_2_ср_2_участок := (T_2[0] + (T_2[1] - T_2[0])/2) + (T_2[1] - (T_2[0] + (T_2[1] - T_2[0])/2))/2 = 211.748 °C
T_2_ср_3_участок := T_2[1] = 247.33 °C
T_2_ср_4_участок := T_2[1] = 247.33 °C
T_2_ср_5_участок := T_2[2] + (T_2[3] - T_2[2])/2 = 271.165 °C
# Расход второго контура:
G_2 = 40.6076 kg/s
# Число труб в кожухе парогенератора:
n_0 = 1261
# Суммарная площадь сечения:
n_0*f = 0.0912741 m^2
f = 72.3823 mm^2
# Удельные объёмы на входе, середине и выходе (Давление постоянно)
#
# 1 участок:
#
# 2 участок:
#
# 3 участок (постоянная температура, давление):
#
# 4 участок (постоянная температура, давление):
#
# 5 участок:
ν_105_3.8_ρ = 0.0010455 m^3/kg
ν_140_3.8_ρ = 0.0010776 m^3/kg
ν_176_3.8_ρ = 0.0011197 m^3/kg
ν_176_3.8_ρ = 0.0011197 m^3/kg
ν_212_3.8_ρ = 0.001174 m^3/kg
ν_247_3.8_вода_ρ = 0.0012456 m^3/kg
ν_247_вода_ρ = 0.0012456 m^3/kg
ν_247_пар_ρ = 0.052468 m^3/kg
ν_247_вода_ρ = 0.0012456 m^3/kg
ν_247_пар_ρ = 0.052468 m^3/kg
ν_247_3.8_пар_ρ = 0.052472 m^3/kg
ν_271_3.8_ρ = 0.057281 m^3/kg
ν_295_3.8_ρ = 0.061559 m^3/kg
# Кинематические вязкости на входе, середине и выходе
#
# 1 участок:
#
# 2 участок:
#
# 3 участок:
#
# 4 участок:
#
# 5 участок:
ν_105_3.8 = 2.8082e-7 m^2/s
ν_140_3.8 = 2.1274e-7 m^2/s
ν_176_3.8 = 1.7297e-7 m^2/s
ν_176_3.8 = 1.7297e-7 m^2/s
ν_212_3.8 = 1.4887e-7 m^2/s
ν_247_3.8 = 1.3371e-7 m^2/s
ν_247_3.8_вода = 1.3371e-7 m^2/s
ν_247_3.8_пар = 9.1268e-7 m^2/s
ν_247_3.8_вода = 1.3371e-7 m^2/s
ν_247_3.8_пар = 9.1268e-7 m^2/s
ν_247_3.8_пар = 9.1268e-7 m^2/s
ν_271_3.8 = 1.062e-6 m^2/s
ν_295_3.8 = 1.2107e-6 m^2/s
# Скорости теплоносителя:
#
# 1 участок:
#
# 2 участок:
#
# 3 участок:
#
# 4 участок:
#
# 5 участок:
n_0 = 1261
v_2_контура_вода_1_участок := G_2*ν_140_3.8_ρ/(n_0*f) = 0.479422 m/s
f = 72.3823 mm^2
G_2 = 40.6076 kg/s
v_2_контура_вода_2_участок := G_2*ν_212_3.8_ρ/(n_0*f) = 0.52231 m/s
v_2_контура_вода_3 := G_2*ν_247_вода_ρ/(n_0*f) = 0.554164 m/s
v_2_контура_пар_3 := G_2*ν_247_пар_ρ/(n_0*f) = 23.3429 m/s
v_2_контура_вода_4 := G_2*ν_247_вода_ρ/(n_0*f) = 0.554164 m/s
v_2_контура_пар_4 := G_2*ν_247_пар_ρ/(n_0*f) = 23.3429 m/s
v_2_контура_пар_5_участок := G_2*ν_271_3.8_ρ/(n_0*f) = 25.4842 m/s
# Параметры паросодержания для участков 3 и 4
#
# 3 участок:
#
# 4 участок:
x_пар_3 := 0.25
x_пар_3_начало := 0
x_пар_3_конец := 0.5
x_пар_4 := 0.75
x_пар_4_начало := 0.5
x_пар_4_конец := 1
# Числа Рейнольдса для середин участков
# (Среднее значение числа Рейнольдса)
#
# 1 участок:
#
# 2 участок:
#
# 3 участок:
#
# 4 участок:
#
# 5 участок:
Re_2_1 := v_2_контура_вода_1_участок*d_вн_трубки/ν_140_3.8 = 21634.1
Re_2_2 := v_2_контура_вода_2_участок*d_вн_трубки/ν_176_3.8 = 28988.7
Re_2_3_вода := v_2_контура_вода_3*d_вн_трубки/ν_247_3.8_вода = 39787.4
Re_2_3_пар := v_2_контура_пар_3*d_вн_трубки/ν_247_3.8_пар = 245531
Re_2_4_вода := v_2_контура_вода_4*d_вн_трубки/ν_247_3.8_вода = 39787.4
Re_2_4_пар := v_2_контура_пар_4*d_вн_трубки/ν_247_3.8_пар = 245531
Re_2_5 := v_2_контура_пар_5_участок*d_вн_трубки/ν_271_3.8 = 230365
v_2_контура_вода_4 = 0.554164 m/s
# Коэффициенты гидравлического сопротивления для второго контура для пяти участков (Re_1 > 10^5 для всех пяти) :
#
# 1 участок:
#
# 2 участок:
#
# 3 участок:
#
# 4 участок:
#
# 5 участок:
v_2_контура_пар_4 = 23.3429 m/s
# Так как течение турбулентное:
ξ_2_1_участка := 0.316*Re_2_1^-0.25 = 0.0260557
ξ_2_2_участка := 0.316*Re_2_2^-0.25 = 0.0242175
ξ_2_3_участка_вода := 0.316*Re_2_3_вода^-0.25 = 0.0223744
ξ_2_3_участка_пар := 1/(1.82*log(Re_2_3_пар) - 1.62)^2 = 0.0149085
ξ_2_4_участка_вода := 0.316*Re_2_4_вода^-0.25 = 0.0223744
ξ_2_4_участка_пар := 1/(1.82*log(Re_2_4_пар) - 1.62)^2 = 0.0149085
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# коэффициенты гидравлического сопротивления для второго контура для участков 3 и 4 для двухфазного состояния:
#
# 3 участок:
#
# 4 участок:
ξ_2_5_участка := (1.82*log(10, Re_2_5) - 1.64^2)^-2 = 0.181046
ξ_2_3_участка_ДФ := (1 - x_пар_3)*ξ_2_3_участка_вода + x_пар_3*ξ_2_3_участка_пар = 0.0205079
x_пар_3 = 0.25
ξ_2_4_участка_ДФ := (1 - x_пар_4)*ξ_2_4_участка_вода + x_пар_4*ξ_2_4_участка_пар = 0.0167749
x_пар_4 = 0.75
ξ_2_5_участка0.316*Re_2_5^-0.25 =  # error
# Плотности для второго контура для однофазного состояния
# (средние плотности)
# (участки 1 2 5):
#
# 1 участок:
#
# 2 участок:
#
# 5 участок:
ρ_ср_2_контура_1_участок := ν_140_3.8_ρ^-1 = 927.988 kg/m^3
ρ_ср_2_контура_2_участок := ν_212_3.8_ρ^-1 = 851.789 kg/m^3
ρ_ср_2_контура_5_участок := ν_271_3.8_ρ^-1 = 17.4578 kg/m^3
x_пар_3_начало = 0
# Плотности для второго контура для двухфазного состояния
# (средние, в начале и конце плотности)
# (участки 3 4)
#
# 3 участок:
#
# 4 участок:
ρ_2_ДФ_3_участка := 1/(x_пар_3/ν_247_пар_ρ^-1 + (1 - x_пар_3)/ν_247_вода_ρ^-1) = 71.1683 kg/m^3
ν_247_пар_ρ = 0.052468 m^3/kg
ν_247_вода_ρ = 0.0012456 m^3/kg
ρ_2_ДФ_3_участка_начало := 1/(x_пар_3_начало/ν_247_пар_ρ^-1 + (1 - x_пар_3_начало)/ν_247_вода_ρ^-1) = 802.826 kg/m^3
x_пар_3_начало = 0
x_пар_3 = 0.25
x_пар_4 = 0.75
ρ_2_ДФ_3_участка_конец := 1/(x_пар_3_конец/ν_247_пар_ρ^-1 + (1 - x_пар_3_конец)/ν_247_вода_ρ^-1) = 37.2345 kg/m^3
x_пар_3_конец = 0.5
x_пар_4_начало = 0.5
ν_247_пар_ρ = 0.052468 m^3/kg
x_пар_4 = 0.75
ρ_2_ДФ_4_участка := 1/(x_пар_4/ν_247_пар_ρ^-1 + (1 - x_пар_4)/ν_247_вода_ρ^-1) = 25.2128 kg/m^3
x_пар_4_конец = 1
x_пар_3 = 0.25
x_пар_3_конец = 0.5
ρ_2_ДФ_4_участка_начало := 1/(x_пар_4_начало/ν_247_пар_ρ^-1 + (1 - x_пар_4_начало)/ν_247_вода_ρ^-1) = 37.2345 kg/m^3
x_пар_4_начало = 0.5
x_пар_4_конец = 1
ρ_2_ДФ_4_участка_конец := 1/(x_пар_4_конец/ν_247_пар_ρ^-1 + (1 - x_пар_4_конец)/ν_247_вода_ρ^-1) = 19.0592 kg/m^3
# Определим перепады давлений для второго контура:
ξ_2_1_участка = 0.0260557
# Первый участок:
L_1 = 0.533336 m
v_2_контура_вода_1_участок = 0.479422 m/s
# Потеря давления на трение о стенки:
ΔP_тр2_1_участка := ξ_2_1_участка*L_1/d_вн_трубки*v_2_контура_вода_1_участок^2/(ν_140_3.8_ρ*2) = 154.376 Pa
ν_140_3.8_ρ = 0.0010776 m^3/kg
# Потеря давления на гидростатическую составляющую:
ΔP_2_гидр_1_участок := ν_140_3.8_ρ^-1*g*L_1 = 4.8536 kPa
d_вн_трубки = 0.0096 m
# Потеря (или выигрыш) давления, обусловленные изменением скорости потока из-за изменения плотности среды на расчётном участке.
ΔP_2_уск_1_участок := (ρ_ср_2_контура_1_участок*v_2_контура_вода_1_участок)^2*(ν_176_3.8_ρ - ν_105_3.8_ρ) = 14.6867 Pa
ρ_ср_2_контура_1_участок = 927.988 kg/m^3
v_2_контура_вода_1_участок = 0.479422 m/s
ξ_2_2_участка = 0.0242175
# Второй участок:
# Потеря давления на трение о стенки:
ΔP_тр2_2_участка := ξ_2_2_участка*L_2/d_вн_трубки*v_2_контура_вода_2_участок^2/(ν_212_3.8_ρ*2) = 171.441 Pa
L_2 = 0.584922 m
# Потеря давления на гидростатическую составляющую:
ΔP_2_гидр_2_участок := ν_212_3.8_ρ^-1*g*L_2 = 4.88596 kPa
# Потеря (или выигрыш) давления, обусловленные изменением скорости потока из-за изменения плотности среды на расчётном участке.
ΔP_2_уск_2_участок := (ρ_ср_2_контура_2_участок*v_2_контура_вода_2_участок)^2*(ν_247_3.8_вода_ρ - ν_176_3.8_ρ) = 24.9199 Pa  # Давление первого контура:
G_2 = 40.6076 kg/s  # Площадь межтрубного пространства:
ξ_2_3_участка_ДФ = 0.0205079
# Третий участок: | Эквивалентный диаметр:
d_вн_трубки = 9.6 mm
# Потеря давления на трение о стенки:
ΔP_тр2_3_участка := ξ_2_3_участка_ДФ*L_3/d_вн_трубки*(G_2/(n_0*f))^2/(ρ_2_ДФ_3_участка*2) = 7.4866 kPa
# Скорость теплоносителя первого контура на входе:
L_3 = 2.52018 m
# Потеря давления на гидростатическую составляющую:
ΔP_2_гидр_3_участок := ((ρ_2_ДФ_3_участка_начало + ρ_2_ДФ_3_участка_конец)/2)*g*L_3 = 10.3809 kPa
# Скорость теплоносителя первого контура на выходе:
ρ_2_ДФ_3_участка = 71.1683 kg/m^3
# Средняя скорость теплоносителя первого контура:
# Потеря (или выигрыш) давления, обусловленные изменением скорости потока из-за изменения плотности среды на расчётном участке.
ΔP_2_уск_3_участок := (G_2/(n_0*f))^2*(1/ρ_2_ДФ_3_участка_конец - 1/ρ_2_ДФ_3_участка_начало) = 5.06932 kPa
# Число Рейнольдса для первого контура:
d_вн_трубки = 9.6 mm
# коэффициент гидравлического сопротивления для первого контура (Re_1 > 10^5):
# Четвёртый участок:
ξ_2_4_участка_ДФ = 0.0167749
# коэффициент гидравлического сопротивления для дистанционирующей решётки:
# Потеря давления на трение о стенки:
ΔP_тр2_4_участка := ξ_2_4_участка_ДФ*L_4/d_вн_трубки*(G_2/(n_0*f))^2/(ρ_2_ДФ_4_участка*2) = 35.271 kPa
ρ_2_ДФ_4_участка
# Потеря давления на гидростатическую составляющую:
ΔP_2_гидр_4_участок := ((ρ_2_ДФ_4_участка_начало + ρ_2_ДФ_4_участка_конец)/2)*g*L_4 = 1.41942 kPa
# Число дистанционирующих решёток:
L_4 = 5.14232 m
# коэффициент полезного действия (КПД) насоса:
ρ_2_ДФ_3_участка_начало = 802.826 kg/m^3
# Потеря (или выигрыш) давления, обусловленные изменением скорости потока из-за изменения плотности среды на расчётном участке.
ΔP_2_уск_4_участок := (G_2/(n_0*f))^2*(1/ρ_2_ДФ_4_участка_конец - 1/ρ_2_ДФ_4_участка_начало) = 5.06932 kPa
v_2_контура_пар_5_участок = 25.4842 m/s
ρ_ср_2_контура_5_участок = 17.4578 kg/m^3
ν_295_3.8_ρ = 61.559 m^3/kg*10^-3
ρ_2_ДФ_3_участка_начало = 802.826 kg/m^3
# Пятый участок:
ρ_2_ДФ_4_участка_конец = 19.0592 kg/m^3
v_2_контура_пар_5_участок = 25.4842 m/s
ν_247_3.8_пар_ρ = 52.472 m^3/kg*10^-3
ν_271_3.8_ρ = 0.057281 m^3/kg
ρ_2_ДФ_4_участка_начало = 37.2345 kg/m^3
# Потеря давления на трение о стенки:
ΔP_тр2_5_участка := ξ_2_5_участка*L_5/d_вн_трубки*v_2_контура_пар_5_участок^2/(ν_271_3.8_ρ*2) = 164.867 kPa
164.86743 kPa
# Потеря давления на гидростатическую составляющую:
ΔP_2_гидр_5_участок := (ν_271_3.8_ρ^-1)*g*L_5 = 264.013 Pa
L_5 = 1.54211 m
ρ_2_ДФ_4_участка_конец = 19.0592 kg/m^3
ρ_2_ДФ_3_участка_начало = 802.826 kg/m^3
# Потеря (или выигрыш) давления, обусловленные изменением скорости потока из-за изменения плотности среды на расчётном участке.
ΔP_2_уск_5_участок := (ρ_ср_2_контура_5_участок*v_2_контура_пар_5_участок)^2*(ν_295_3.8_ρ - ν_247_3.8_пар_ρ) = 1.79862 kPa
ρ_2_ДФ_4_участка_начало = 37.2345 kg/m^3
ν_247_3.8_пар_ρ = 0.052472 m^3/kg
ρ_2_ДФ_3_участка_конец = 37.2345 kg/m^3
# Учёт местных сопротивлений:
v_2_105_3.8 := G_2*ν_105_3.8_ρ/(n_0*f) = 0.46514 m/s
ν_105_3.8_ρ = 0.0010455 m^3/kg
L_5 = 1.54211 m
ρ_2_ДФ_4_участка_начало = 37.2345 kg/m^3
v_2_контура_пар_5_участок = 25.4842 m/s
# Вход (Первый участок)
ΔP_мест_вход := 2.3*v_2_105_3.8^2/(2*ν_105_3.8_ρ) = 237.981 Pa
ρ_2_ДФ_4_участка_конец = 19.0592 kg/m^3
ρ_ср_2_контура_5_участок = 17.4578 kg/m^3
v_2_контура_пар_5_участок = 25.4842 m/s
v_2_295_3.8 := G_2*ν_295_3.8_ρ/(n_0*f) = 27.3874 m/s
ν_295_3.8_ρ = 0.061559 m^3/kg
# Выход (Пятый участок)
ΔP_мест_выход := 2.3*v_2_295_3.8^2/(2*ν_295_3.8_ρ) = 14.0123 kPa
ν_295_3.8_ρ = 0.061559 m^3/kg
ρ_2_ДФ_4_участка_конец = 19.0592 kg/m^3
ρ_2_ДФ_4_участка_начало = 37.2345 kg/m^3
ν_271_3.8_ρ = 57.281 m^3/kg*10^-3
ν_247_3.8_пар_ρ = 0.052472 m^3/kg
(1/ρ_2_ДФ_4_участка_конец - 1/ρ_2_ДФ_4_участка_начало) = 0.0256112 m^3/kg
# Итого, перепады давлений для всех пяти участков:
ΔP_2_1_участка := ΔP_тр2_1_участка + ΔP_2_гидр_1_участок - ΔP_2_уск_1_участок + ΔP_мест_вход = 5.23127 kPa
(1/ρ_2_ДФ_3_участка_конец - 1/ρ_2_ДФ_3_участка_начало) = 0.0256112 m^3/kg
ΔP_2_2_участка := ΔP_тр2_2_участка + ΔP_2_гидр_2_участок - ΔP_2_уск_2_участок = 5.03249 kPa
ΔP_2_3_участка := ΔP_тр2_3_участка + ΔP_2_гидр_3_участок - ΔP_2_уск_3_участок = 12.7981 kPa
ΔP_2_4_участка := ΔP_тр2_4_участка + ΔP_2_гидр_4_участок - ΔP_2_уск_4_участок = 31.6211 kPa
ΔP_2_5_участка := ΔP_тр2_5_участка + ΔP_2_гидр_5_участок - ΔP_2_уск_5_участок + ΔP_мест_выход = 177.345 kPa
ρ_2_ДФ_3_участка_конец = 37.2345 kg/m^3
ρ_2_ДФ_3_участка_начало = 802.826 kg/m^3
# Определим мощности на прокачку для каждых из участков:
G_2 = 40.6076 kg/s
η_н = 0.85
ρ_2_ДФ_3_участка_конец = 37.2345 kg/m^3
ρ_2_ДФ_3_участка_начало = 802.826 kg/m^3
ΔN_2_контура_1_участок := G_2/(ρ_ср_2_контура_1_участок*η_н)*ΔP_2_1_участка = 269.311 W
1/(37.23452 kg/m^3) - 1/(802.82595 kg/m^3) = 0.0256112 m^3/kg
ΔN_2_контура_2_участок := G_2/(ρ_ср_2_контура_2_участок*η_н)*ΔP_2_2_участка = 282.253 W
ρ_ср_2_контура_1_участок = 927.988 kg/m^3
(1/ρ_2_ДФ_3_участка_конец - 1/ρ_2_ДФ_3_участка_начало) - (1/ρ_2_ДФ_4_участка_конец - 1/ρ_2_ДФ_4_участка_начало) = 0 m^3/kg
ΔN_2_контура_3_участок := G_2/(ρ_2_ДФ_3_участка*η_н)*ΔP_2_3_участка = 8.5911 kW
ρ_ср_2_контура_2_участок = 851.789 kg/m^3
1/19.05924 - 1/37.23452 = 0.0256112
ΔN_2_контура_4_участок := G_2/(ρ_2_ДФ_4_участка*η_н)*ΔP_2_4_участка = 59.9161 kW
ρ_2_ДФ_3_участка = 71.1683 kg/m^3
ρ_2_ДФ_4_участка_конец = 19.0592 kg/m^3
ρ_2_ДФ_4_участка_начало = 37.2345 kg/m^3
ΔN_2_контура_5_участок := G_2/(ρ_ср_2_контура_5_участок*η_н)*ΔP_2_5_участка = 485.309 kW
ρ_2_ДФ_4_участка = 25.2128 kg/m^3
ρ_ср_2_контура_5_участок = 17.4578 kg/m^3  # было
# Итого, суммарная мощность на прокачку равна: | 0.10078 MW
# стало
ΔN := ΔN_1_контура + (ΔN_2_контура_1_участок + ΔN_2_контура_2_участок + ΔN_2_контура_3_участок + ΔN_2_контура_4_участок + ΔN_2_контура_5_участок) = 0.554368 MW
0.51601 MW
ΔN_1_контура = 0 W
ΔN_2_контура_5_участок = 485309 W
# Определим КПД Нетто:
ΔN_1_контура = 0 MW
3.7*10^4
# Параметры для определения КПД Нетто:
(ΔN_2_контура_1_участок + ΔN_2_контура_2_участок + ΔN_2_контура_3_участок + ΔN_2_контура_4_участок + ΔN_2_контура_5_участок) = 554.368 kW
η_Брутто = 0.310074
N_парогенераторов = 10
Q_реактора = 1015.89 MW
-0.044 MW  # было
ΔN = 0.554368 MW
0.30908
0.30908 - 0.30499 = 0.00409
# стало
# Вычислим КПД Нетто: | 0.30499
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η_нетто := η_Брутто - ΔN*N_парогенераторов/Q_реактора = 0.304617
δ_днища := 10 mm
ΔN*N_парогенераторов/Q_реактора = 0.00545699
# Парогенераторы стоят внутри реактора - интегральная компоновка. Давление внутри и снаружи кожуха одинаковое. была выбрана сравнительно небольшая толщина стенки корпуса парогенератора δ_ст_парогенератора = 10 mm и толщиной днища δ_днища = 10 mm
N_парогенераторов = 10
Q_реактора = 1.01589e9 W
δ_ст_парогенератора = 10 mm
ΔN = 554368 W
# Прочностной расчёт толщины трубной доски:
# Расчётное давление (раннее было вычислено):
p_расч = 14.875 MPa
# Предел прочности стали:
σ_Н = 200 MPa
# Шаг между центрами отверстий:
t = 0.0192 m
# Внутренний диаметр парогенератора:
d_вн_парогенератора = 800 mm
# Коэффициент прочности (коэффициент ослабления) трубной доски, который учитывает уменьшение её прочности из-за отверстий для труб.
φ_трубной_доскаи := 0.975 - 0.68*d_трубки/t = 0.408333
t = 0.0192 m
# Толщина трубной доски:
δ_трубной_доски := 0.393*d_вн_парогенератора*sqrt(p_расч/(σ_Н*φ_трубной_доскаи)) = 134.18 mm
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# Параметры парогенератора интегральной компоновки для РИТМ-400:
# Электрическая мощность реактора:
W_эл = 315 MW
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# Тепловая мощность реактора:
Q_реактора = 1015.89 MW
# КПД-брутто:
η_Брутто = 0.310074
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# Тепловая мощность парогенератора, МВТ:
Q_парогенератора = 101.589 MW
# Количество парогенераторов:
N_парогенераторов = 10
# Расход теплоносителя первого контура:
G_1 = 528.674 kg/s
# Расход теплоносителя второго контура:
G_2 = 40.6076 kg/s
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# Средняя скорость теплоносителя
v_1_контура_средняя = 2.87983 m/s
# Средняя скорость воды второго контура:
v_2_контура_вода = 0.498152 m/s
# Скорость пара на выходе из парогенератора:
v_2_контура_пар = 27.3874 m/s
# Площадь теплообменной поверхности
F = 654.313 m^2
# Средняя длина труб:
L = 10.3229 m
# Диаметр труб:
d_трубки = 16 mm
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# Толщина стенки трубки:
δ_ст_трубки = 3.2 mm
# Число труб для одного парогенератора:
n_0 = 1261
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δ_днища := 8 mm
# Диаметр кожуха парогенератора:
d_наружный_пагоренератора = 0.82 m
# Толщина днища парогенератора:
δ_днища = 8 mm
# Толщина стенки парогенератора:
δ_ст_парогенератора = 10 mm
# Толщина трубной доски:
δ_трубной_доски = 134.18 mm
# КПД-нетто:
η_нетто = 0.304617
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