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# Дано:
P := 65*10^3  # Н
A := 0
q := 80*10^3  # Н/м
B := 0.8
d := 5*10^-2  # м
C := 1.6
a := 0.8
# м
D := 2.4
ΔT := -15  # град
E := 2*10^5*10^6  # Па
γ_1 := 2
# Соотношения для
# диаметров
α := 12*10^-6  # град^-1
γ_2 := 1
σ_t := 300*10^6  # Предел текучести
n_t := 1.6  # Нормативный запас прочности
μ := 0.3  # Коэффициент Пуассона
F_1 := π*(γ_1*d)^2/4
F_2 := π*(γ_2*d)^2/4
# 1. Сумма проекций всех сил, действующих на брус, равна нулю.
-R_A - P - integral(q, x = 0 .. C - B) + 2*P + R_D == 0
R_A == P - integral(q, x = 0 .. C - B) + R_D
# 2. Перемещение сечения D есть ноль
# 2.1 Рассмотрим вклад силы P1=P (сжатие)
Δx_1(P_1) == -P_1*(B - A)/(F_1*E)
Δx_1 := -P*a/(F_1*E)
# 2.2 Рассмотрим вклад силы P2=2P (растяжение)
Δx_2(P_2) == P_2*(C - A)/(F_1*E)
Δx_2 := 4*P*a/(F_1*E)
# 2.3 Рассмотрим вклад силы P3=RD (растяжение)
# В силу того, что имеются 2 участка разной площади, получим 2 слагаемых
Δx_3.1(P_3) == P_3*(D - C)/(F_2*E)
Δx_3.1(R_D) := R_D*a/(F_2*E)
Δx_3.2(P_3) == P_3*(C - A)/(F_1*E)
Δx_3.2(R_D) := R_D*2*a/(F_1*E)
# 2.4 Рассмотрим вклад величины q(x) (сжатие)
Δx_4.1 := -q*a^2/(2*F_1*E)
Δx_4.1(q) == integral(x*q(x)/(F_1*E), x = 0 .. C - B)
Δx_4.2(q) == integral(q(x)/(F_1*E), x = 0 .. C - B)*(B - A)
Δx_4.2 := -q*a^2/(F_1*E)
# 2.5 Рассмотрим вклад разности температур ΔT
Δx_5 == α*ΔT*(D - C)
Δx_5 := α*ΔT*a
# 3. Вычисление RA и  RD
F_R_D(R_D, F_1, F_2) := -P*a/(F_1*E) + 4*P*a/(F_1*E) + R_D*a/(F_2*E) + R_D*2*a/(F_1*E) - q*a^2/(2*F_1*E) - q*a^2/(F_1*E) + α*ΔT*a
R_D := F_R_D(R_D, π*(γ_1*d)^2/4, π*(γ_2*d)^2/4) solve, float, 10 → 30623.8898
R_A := P - integral(q, x = 0 .. C - B) + R_D
R_A float, 10 → 31623.8898
# 4. Определение продольных сил
# 4.1 Участок [AB]:
F_N_x_AB(N_x.AB) := -R_A + N_x.AB
N_x.AB := F_N_x_AB(N_x.AB) solve, float, 10 → 31623.8898
# 4.2 Участок [BC]:
F_N_x_BC(N_x.BC, x) := -R_A - P - integral(q, x = 0 .. x) + N_x.BC
N_x.BC.B := F_N_x_BC(N_x.BC, 0) solve → 96623.8898
N_x.BC.C := F_N_x_BC(N_x.BC, a) solve → 160623.8898
# 4.3 Участок [CD]:
F_N_x_CD(N_x.CD) := -R_A - P - integral(q, x = 0 .. C - B) + 2*P + N_x.CD
N_x.CD := F_N_x_CD(N_x.CD) solve → 30623.8898
# 5. Определение касательных напряжений
# 5.1 Участок [AB]:
σ_x.AB := N_x.AB/F_1 = 4026479
# 5.2 Участок [BC]:
σ_x.BC.B := N_x.BC.B/F_1 = 12302536
σ_x.BC.C := N_x.BC.C/F_1 = 20451269
σ_x.BC.x(x) := (R_A + P + q*x)/F_1
# 5.3 Участок [CD]:
σ_x.CD := N_x.CD/F_2 = 15596619
# 6. Определение относительных линейных деформаций
# 6.1 Участок [AB]:
ε_x.AB := σ_x.AB/E = 2.01324e-5
# 6.1 Участок [BC]:
ε_x.BC.B := σ_x.BC.B/E = 6.15127e-5
ε_x.BC.C := σ_x.BC.C/E = 0.000102256
ε_x.BC.x(x) := σ_x.BC.x(x)/E float, 10 → 0.00005092958179*x + 0.00006151267873
# 6.1 Участок [CD]:
ε_x.CD := σ_x.CD/E + α*ΔT = -0.000102017
# 7. Определение перемещений сечений
# 7.1 Участок [AB]:
U_x.B(U_x.A, ε_x.AB) := U_x.A + integral(ε_x.AB, x = 0 .. B - A)
U_x.B := U_x.B(0, ε_x.AB) float, 10 → 0.00001610591482
# 7.2 Участок [BC]:
U_x.C(ε_x.BC.x) := U_x.B + integral((R_A + P + q*x)/(E*F_1), x = 0 .. C - B) float, 10 → 0.00008161352398
U_x.C := U_x.C(ε_x.BC.x) float, 10 → 0.00008161352398
# 7.1 Участок [CD]:
U_x.D(ε_x.BC.x) := U_x.C + integral(ε_x.CD, x = 0 .. D - C) float, 10 → -(0.8845136*10^-14)
U_x.D := U_x.D(ε_x.BC.x)
# 8. Определение относительных поперечных деформаций и относительного изменения объёма
# Напряжение максимально в точке x=C
σ_max := |2.045*10^7|  # Па
μ == |ε_y/ε_x| == |ε_z/ε_x|
ε_y == ε_z
ε_z := -μ*σ_max/E + α*ΔT = -0.000210675
ε_y := ε_z
ε_x := ε_x.BC.C
ε_V := ε_x + ε_y + ε_z = -0.000319094
# 9. Проверка условия прочности
σ_доп := σ_t/n_t = 187500000
σ_max = 20450000
|σ_max| < |σ_доп|  # Значит, условие прочности выполнено
x := [0; 0.8; 0.8; 1.6; 1.6; 2.4] m
N := [N_x.AB; N_x.AB; N_x.BC.B; N_x.BC.C; N_x.CD; N_x.CD] N
σ := [σ_x.AB; σ_x.AB; σ_x.BC.B; σ_x.BC.C; σ_x.CD; σ_x.CD] Pa
ε := [ε_x.AB; ε_x.AB; ε_x.BC.B; ε_x.BC.C; ε_x.CD; ε_x.CD]
x = [0; 0.8; 0.8; 1.6; 1.6; 2.4] m
N = [31.6239; 31.6239; 96.6239; 160.624; 30.6239; 30.6239] kN
σ = [4.02648; 4.02648; 12.3025; 20.4513; 15.5966; 15.5966] MPa
ε = [2.01324e-5; 2.01324e-5; 6.15127e-5; 0.000102256; -0.000102017; -0.000102017]
# [plot: N (kN) vs x]
# [plot: σ (MPa) vs x]
# [plot: ε vs x]
x := 0, 0.01 .. 5
B = 0.8
U(x) :=
    if x ≥ 0 and x ≤ B
        t ← U_x.B/B*x
    if x > B and x ≤ C
        t ← U_x.B + integral((R_A + P + q*x)/(E*F_1), x = 0 .. x - B)
    if x > C and x ≤ D
        t ← U_x.C + integral(ε_x.CD, x = 0 .. x - C)
# [plot: U(x) vs x]
C = 1.6
D = 2.4
U_x.B = 1.61059e-5
U_x.C = 8.16135e-5
R_A = 31623.9
P = 65000
q = 80000
E = 200000000000
F_1 = 0.00785398
ε_x.CD = -0.000102017
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