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# Дано
a_0 := 0.5 m  # м
A_0 := 0 m
γ := 2
q_0 := 65000 N/m
B_0 := 0.5 m
σ := 160*10^6*Pa
P_0 := q_0*a_0
C_0 := 1 m
M_0 := q_0*a_0^2
D_0 := 1.5 m
E_0 := 2 m
# 1. Определение реакций опор
# 1.1 Сумма всех сил вдоль оси y ноль
-q*a - P + 2*P + R_A - R_E == 0
R_A_2(a, q, P, R_E) := -q*a - P + 2*P + R_A - R_E solve, R_A → a*q + (R_E - P)
R_A_2(a, q, P, R_E) → a*q + (R_E - P)
# 1.2 Сумма всех вращающих моментов ноль (рассмотрим вращение вокруг оси в точке A)
-q*a*a/2 - P*a + 2*P*2*a - R_E*4*a - M == 0
R_E_1(a, q, P, M) := -q*a*a/2 - P*a + 2*P*2*a - R_E*4*a - M solve, R_E → (-(a^2*q) + (6*P*a - 2*M))/(8*a)
# 1.3
R_E_0 := R_E_1(a_0, q_0, P_0, M_0) → 12187.5*N
R_A_0 := R_A_2(a_0, q_0, P_0, R_E_0) → 12187.5*N
# 2. Определение Qy и Mz
2.1
AB
M_z_AB_x_2(q, R_A, x, A) := R_A*(x - A) - integral((t - A)*q, t = 0 .. x - A)
M_z_AB_x(x) := M_z_AB_x_2(q_0, R_A_0, x, A_0) → -1.0*32500.0*N*x^2/m + 12187.5*N*x
BC
M_z_BC_x_2(q, R_A, x, A, B, P) := R_A*(x - A) - ((x - A) - (B - A)/2)*q*(B - A) - P*(x - B)
M_z_BC_x_0(x) := M_z_BC_x_2(q_0, R_A_0, x, A_0, B_0, P_0) → -32500.0*N*(x - 0.25*m) + (12187.5*N*x - 32500.0*N*(x - 0.5*m))
CD
M_z_CD_x_2(q, R_A, x, A, B, P, C) := R_A*(x - A) - ((x - A) - (B - A)/2)*q*(B - A) - P*(x - B) + 2*P*(x - C)
M_z_CD_x_0(x) := M_z_CD_x_2(q_0, R_A_0, x, A_0, B_0, P_0, C_0) → -32500.0*N*(x - 0.25*m) + (65000.0*N*(x - 1.0*m) + 12187.5*N*x - 32500.0*N*(x - 0.5*m))
DE
M_z_DE_x_2(q, R_A, x, A, B, P, C) := R_A*(x - A) - ((x - A) - (B - A)/2)*q*(B - A) - P*(x - B) + 2*P*(x - C)
M_z_DE_x_0(x) := M_z_DE_x_2(q_0, R_A_0, x, A_0, B_0, P_0, C_0) → -32500.0*N*(x - 0.25*m) + (65000.0*N*(x - 1.0*m) + 12187.5*N*x - 32500.0*N*(x - 0.5*m))
2.2
AB
Q_y_AB_x_2(q, x, R_A) := R_A - q*x + Q_y_AB_x solve, Q_y_AB_x → q*x - R_A
Q_y_AB_x(x) := Q_y_AB_x_2(q_0, x, R_A_0) → 65000.0*N*x/m - 12187.5*N
BC
Q_y_BC_x_2(q, x, R_A, P, A, B) := R_A - q*(B - A) - P + Q_y_BC_x solve, Q_y_BC_x → (B - A)*q + (P - R_A)
Q_y_BC_x(x) := Q_y_BC_x_2(q_0, x, R_A_0, P_0, A_0, B_0) → 52812.5*N
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CD
Q_y_CD_x_2(q, x, R_A, P, A, B) := R_A - q*(B - A) - P + 2*P + Q_y_CD_x solve, Q_y_CD_x → (B - A)*q - (P + R_A)
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Q_y_CD_x(x) := Q_y_CD_x_2(q_0, x, R_A_0, P_0, A_0, B_0) → -12187.5*N
DE
Q_y_DE_x_2(q, x, R_A, P, A, B) := R_A - q*(B - A) - P + 2*P + Q_y_DE_x solve, Q_y_DE_x → (B - A)*q - (P + R_A)
Q_y_DE_x(x) := Q_y_DE_x_2(q_0, x, R_A_0, P_0, A_0, B_0) → -12187.5*N
x_0 := A_0, 0.01 m .. E_0
Q_y(x) :=
    if x ≥ A_0 and x ≤ B_0
        t ← Q_y_AB_x(x)
    if x > B_0 and x ≤ C_0
        t ← Q_y_BC_x(x)
    if x > C_0 and x ≤ D_0
        t ← Q_y_CD_x(x)
    if x > D_0 and x ≤ E_0
        t ← Q_y_DE_x(x)
M_z(x) :=
    if x ≥ A_0 and x ≤ B_0
        t ← M_z_AB_x(x)
    if x > B_0 and x ≤ C_0
        t ← M_z_BC_x_0(x)
    if x > C_0 and x ≤ D_0
        t ← M_z_CD_x_0(x)
    if x > D_0 and x ≤ E_0
        t ← M_z_DE_x_0(x)
# [plot: Q_y(x_0) (kN) vs x_0]
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# [plot: M_z(x_0) (kN*m) vs x_0]
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# 3. Подбор сечений, построение эпюр в точке Е
# 3.1 Круглое сечение
Q_y(E_0) = -12187.5 N
M_z(E_0) = -16250 N*m
M_z_max := |M_z_BC_x_0(C_0)| → 28437.5*N*m
# определение минимального диаметра:
W_z_круг(d) := π*d^3/32*m^3
I_z_круг(d) := π*d^4/64*m^4
W_z ≥ M_z_max/σ → W_z ≥ 0.000177734375*N*m/Pa
d := nthroot(M_z_max*32/(σ*π), 3) = 0.121878 m
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# Построение эпюр
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I_z_круг(d) := π*d^4/64
σ_x_круг(y) := M_z(E_0)/I_z_круг(d)*y
τ_xy_круг(y) := Q_y(E_0)*(2*integral(1/2*((d/2)^2 - u^2 - y^2), u = 0 .. sqrt((d/2)^2 - y^2)))/(I_z_круг(d)*(2*sqrt((d/2)^2 - y^2)))
y_0 := -1/2*d, -0.9999/2*d .. 1/2*d
# [plot: y_0 vs σ_x_круг(y_0) (MPa)]
# [plot: y_0 vs τ_xy_круг(y_0) (MPa)]
# 3.2 Прямоугольное сечение
Q_y(E_0) = -12187.5 N
M_z(E_0) = -16250 N*m
M_z_max := |M_z_BC_x_0(C_0)| → 28437.5*N*m
# подбор размеров сечения:
W_z_брус(b, h) == b*h^2/6*m^3
b := nthroot(6*M_z_max/(σ*γ^2), 3) = 0.0643607 m
b = 0.0643607 m
h := γ*b = 0.128721 m
# Построение эпюр
I_z_прямоугольник(d, b, h) := b*h^3/12
σ_x_прямоугольник(y) := M_z(E_0)/I_z_прямоугольник(d, b, h)*y
τ_xy(y) := Q_y(E_0)*b*integral(v, v = y .. h/2)/(I_z_прямоугольник(d, b, h)*b)
y_0 := -1/2*h, -0.99999/2*h .. 1/2*h
# [plot: y_0 vs σ_x_прямоугольник(y_0) (MPa)]
# [plot: y_0 vs τ_xy(y_0) (MPa)]
h/2 = 0.0643607 m
τ_xy(h/2) = 0 Pa
# 3.3 Двутавровая балка
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# Выберем двутавр 20Б1
Q_y(E_0) = -12187.5 N
h := 200.0*10^-3 m
M_z(E_0) = -16250 N*m
b := 100.0*10^-3 m
M_z_max := |M_z_BC_x_0(C_0)| → 28437.5*N*m
s := 5.5*10^-3*m
t := 8.0*10^-3*m
h_W := 184.0*10^-3*m
h_b := 47.25*10^-3*m
r := 11.0*10^-3*m
F_Н := 27.16*10^-4*m^2
I_x := 1844.26*10^-8*m^4
I_z := I_x
# Построение эпюр
y_0 := -1/2*h, -0.9999/2*h .. 1/2*h
σ_x_двутавр(y) := M_z(E_0)/I_z*y
τ_xy(y) :=
    if 0 ≤ |y| < h_W/2
        τ_xy ← Q_y(E_0)*(s*((h_W/2)^2 - y^2)/2 + b*((h/2)^2 - (h_W/2)^2)/2)/(I_z*s)
    if h/2 ≥ |y| ≥ h_W/2
        τ_xy ← Q_y(E_0)*(b*((h/2)^2 - y^2)/2)/(I_z*b)
# [plot: y_0 vs σ_x_двутавр(y_0) (MPa)]
# [plot: y_0 vs τ_xy(y_0) (MPa)]
# Анализ напряжённого состояния в месте перехода стенки двутавра в полку
Q_y(E_0) = -12187.5 N  # меньше нуля, значит, касательное напряжение вверх
σ_x := σ_x_двутавр(h_W/2) = -81062323 Pa
τ_xy := τ_xy((h_W - 0.0001*m)/2) = -9230687 Pa
σ_1 := σ_x/2 + sqrt(σ_x^2/4 + τ_xy^2) = 1037825 Pa
σ_3 := σ_x/2 - sqrt(σ_x^2/4 + τ_xy^2) = -82100148 Pa
σ_2 := σ_x
α := 1/2*atan(2*τ_xy/σ_x)*180/π = 6.41494  # Град
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σ_1 = 1037825 Pa
α := 6.415 deg
σ_3 = -82100148 Pa
σ_2 = -81062323 Pa
α = 6.415°
# Интеграл Мора
E_ю := 2*10^5*10^6
A_0 := 0
γ := 2
a_0 := 0.5
B_0 := 0.5
σ := 160*10^6
# Первый пункт
q_0 := 65000
C_0 := 1
P_0 := q_0*a_0
D_0 := 1.5
M_0 := q_0*a_0^2
E_0 := 2
R_Ae(R_Ee, P_e) := R_Ae + R_Ee - P_e == 0 solve, R_Ae → -R_Ee + P_e
R_Ee(A, B, E, P_e) := P_e*(B - A) == R_Ee*(E - A) solve, R_Ee → (P_e*B - P_e*A)/(E - A)
P_e_0 := 1
R_Ee_0 := R_Ee(A_0, B_0, E_0, P_e_0) = 0.25
R_Ae_0 := R_Ae(R_Ee_0, P_e_0) = 0.75
# AB:
M_ze_AB(R_Ae, A, x) := -R_Ae*(x - A)
M_ze_AB_0(x) := M_ze_AB(R_Ae_0, A_0, x) → -0.75*x
# BE
M_ze_BE(R_Ae, A, B, P_e, x) := -R_Ae*(x - A) + P_e*(x - B)
M_ze_BE_0(x) := M_ze_BE(R_Ae_0, A_0, B_0, P_e_0, x) → 0.25*x - 0.5
R_E_0 := R_E_1(a_0, q_0, P_0, M_0) → 12187.5
R_A_0 := R_A_2(a_0, q_0, P_0, R_E_0) → 12187.5
AB
M_z_AB_x_2(q, R_A, x, A) := R_A*(x - A) - integral((t - A)*q, t = 0 .. x - A)
M_z_AB_x(x) := M_z_AB_x_2(q_0, R_A_0, x, A_0) → -32500.0*x^2 + 12187.5*x
BC
M_z_BC_x_2(q, R_A, x, A, B, P) := R_A*(x - A) - ((x - A) - (B - A)/2)*q*(B - A) - P*(x - B)
M_z_BC_x_0(x) := M_z_BC_x_2(q_0, R_A_0, x, A_0, B_0, P_0) → -52812.5*x + 24375.0
CD
M_z_CD_x_2(q, R_A, x, A, B, P, C) := R_A*(x - A) - ((x - A) - (B - A)/2)*q*(B - A) - P*(x - B) + 2*P*(x - C)
M_z_CD_x_0(x) := M_z_CD_x_2(q_0, R_A_0, x, A_0, B_0, P_0, C_0) → 12187.5*x - 40625.0
DE
M_z_DE_x_2(q, R_A, x, A, B, P, C) := R_A*(x - A) - ((x - A) - (B - A)/2)*q*(B - A) - P*(x - B) + 2*P*(x - C)
M_z_DE_x_0(x) := M_z_DE_x_2(q_0, R_A_0, x, A_0, B_0, P_0, C_0) → 12187.5*x - 40625.0
d := 0.122
I_z_круг(d) := π*d^4/64
integral(M_ze_AB_0(x)*M_z_AB_x(x)/(E_ю*I_z_круг(d)), x = 0 .. 0.5) + integral(M_ze_BE_0(x)*M_z_BC_x_0(x)/(E_ю*I_z_круг(d)), x = 0.5 .. 1) + integral(M_ze_BE_0(x)*M_z_CD_x_0(x)/(E_ю*I_z_круг(d)), x = 1 .. 1.5) + integral(M_ze_BE_0(x)*M_z_DE_x_0(x)/(E_ю*I_z_круг(d)), x = 1.5 .. 2) → 0.00243216445342
b := 0.064
h := 0.129
I_z_прямоугольник(b, h) := b*h^3/12
I_z_прямоугольник(b, h) = 1.1449e-5
integral(M_ze_AB_0(x)*M_z_AB_x(x)/(E_ю*I_z_прямоугольник(b, h)), x = 0 .. 0.5) + integral(M_ze_BE_0(x)*M_z_BC_x_0(x)/(E_ю*I_z_прямоугольник(b, h)), x = 0.5 .. 1) + integral(M_ze_BE_0(x)*M_z_CD_x_0(x)/(E_ю*I_z_прямоугольник(b, h)), x = 1 .. 1.5) + integral(M_ze_BE_0(x)*M_z_DE_x_0(x)/(E_ю*I_z_прямоугольник(b, h)), x = 1.5 .. 2) → 0.00231011872018
I_z_двутавр := 1844.26*10^-8
integral(M_ze_AB_0(x)*M_z_AB_x(x)/(E_ю*I_z_двутавр), x = 0 .. 0.5) + integral(M_ze_BE_0(x)*M_z_BC_x_0(x)/(E_ю*I_z_двутавр), x = 0.5 .. 1) + integral(M_ze_BE_0(x)*M_z_CD_x_0(x)/(E_ю*I_z_двутавр), x = 1 .. 1.5) + integral(M_ze_BE_0(x)*M_z_DE_x_0(x)/(E_ю*I_z_двутавр), x = 1.5 .. 2) → 0.0014341019004
# Второй пункт: в точке D приложим единичный момент
M_e_0 := 1
R_Ae(M_e, A, E) := M_e/(E - A)
R_Ae_0 := R_Ae(M_e_0, A_0, E_0) = 0.5
R_De(M_e, A, E) := M_e/(E - A)
R_De_0 := R_De(M_e_0, A_0, E_0) = 0.5 1/m
# AD:
M_z_AD(x, A, R_Ae) := R_Ae*(x - A)
M_z_AD(x) := M_z_AD(x, A_0, R_Ae_0) → 0.5*x
# DE:
M_z_DE(x, A, R_Ae, M_e) := R_Ae*(x - A) - M_e
M_z_DE(x) := M_z_DE(x, A_0, R_Ae_0, M_e_0) → 0.5*x - 1.0
AB
M_z_AB_x_2(q, R_A, x, A) := R_A*(x - A) - integral((t - A)*q, t = 0 .. x - A)
M_z_AB_x(x) := M_z_AB_x_2(q_0, R_A_0, x, A_0) → -32500.0*x^2 + 12187.5*x
BC
M_z_BC_x_2(q, R_A, x, A, B, P) := R_A*(x - A) - ((x - A) - (B - A)/2)*q*(B - A) - P*(x - B)
M_z_BC_x_0(x) := M_z_BC_x_2(q_0, R_A_0, x, A_0, B_0, P_0) → -52812.5*x + 24375.0
CD
M_z_CD_x_2(q, R_A, x, A, B, P, C) := R_A*(x - A) - ((x - A) - (B - A)/2)*q*(B - A) - P*(x - B) + 2*P*(x - C)
M_z_CD_x_0(x) := M_z_CD_x_2(q_0, R_A_0, x, A_0, B_0, P_0, C_0) → 12187.5*x - 40625.0
DE
M_z_DE_x_2(q, R_A, x, A, B, P, C) := R_A*(x - A) - ((x - A) - (B - A)/2)*q*(B - A) - P*(x - B) + 2*P*(x - C)
M_z_DE_x_0(x) := M_z_DE_x_2(q_0, R_A_0, x, A_0, B_0, P_0, C_0) → 12187.5*x - 40625.0
integral(M_z_AD(x)*M_z_AB_x(x)/(E_ю*I_z_круг(d)), x = 0 .. 0.5) + integral(M_z_AD(x)*M_z_BC_x_0(x)/(E_ю*I_z_круг(d)), x = 0.5 .. 1) + integral(M_z_AD(x)*M_z_CD_x_0(x)/(E_ю*I_z_круг(d)), x = 1 .. 1.5) + integral(M_z_DE(x)*M_z_DE_x_0(x)/(E_ю*I_z_круг(d)), x = 1.5 .. 2) → -0.00447518259429
integral(M_z_AD(x)*M_z_AB_x(x)/(E_ю*I_z_прямоугольник(b, h)), x = 0 .. 0.5) + integral(M_z_AD(x)*M_z_BC_x_0(x)/(E_ю*I_z_прямоугольник(b, h)), x = 0.5 .. 1) + integral(M_z_AD(x)*M_z_CD_x_0(x)/(E_ю*I_z_прямоугольник(b, h)), x = 1 .. 1.5) + integral(M_z_DE(x)*M_z_DE_x_0(x)/(E_ю*I_z_прямоугольник(b, h)), x = 1.5 .. 2) → -0.00425061844514
integral(M_z_AD(x)*M_z_AB_x(x)/(E_ю*I_z_двутавр), x = 0 .. 0.5) + integral(M_z_AD(x)*M_z_BC_x_0(x)/(E_ю*I_z_двутавр), x = 0.5 .. 1) + integral(M_z_AD(x)*M_z_CD_x_0(x)/(E_ю*I_z_двутавр), x = 1 .. 1.5) + integral(M_z_DE(x)*M_z_DE_x_0(x)/(E_ю*I_z_двутавр), x = 1.5 .. 2) → -0.00263874749674
U := 1
m := 1
h := 1
Re(A*e^(1i*k_1*x) + A*(k_1 - k_2)/(k_1 + k_2)*e^(-1i*k_1*x))^2 + Im(A*e^(1i*k_1*x) + A*(k_1 - k_2)/(k_1 + k_2)*e^(-1i*k_1*x))^2 simplify, collect, A → -(A^2*((2*k_2^2 - 2*k_1^2)*cos(2*k_1*x) - (2*k_2^2 + 2*k_1^2))/(k_2^2 + 2*k_1*k_2 + k_1^2))
Re(A*2*k_1/(k_1 + k_2)*e^(1i*k_2*x))^2 + Im(A*2*k_1/(k_1 + k_2)*e^(1i*k_2*x))^2 simplify, collect, A → 4*k_1^2/(k_2^2 + 2*k_1*k_2 + k_1^2)*A^2
k_1 := sqrt(2*m*3/2*U)/h
k_2 := sqrt(2*m*(3/2*U - U))/h
(2*k_1^2 - 2*k_2^2)/(k_2^2 + 2*k_1*k_2 + k_1^2) simplify → 2/(sqrt(3) + 2) = 0.535898
a := -6
b := -5.999
(2*k_2^2 + 2*k_1^2)/(k_2^2 + 2*k_1*k_2 + k_1^2) simplify → 4/(sqrt(3) + 2) = 1.0718
c := 5
4*k_1^2/(k_2^2 + 2*k_1*k_2 + k_1^2) simplify → 6/(sqrt(3) + 2) = 1.6077
b - a = 0.001
x_0 := a, b .. c = [
    -6; -5.999; -5.998
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]
ρ_E(x, U, A, m, h_0) :=
    if x < 0
        t ← A^2*(2/(sqrt(3) + 2))*cos(2*sqrt(2*m*3/2*U)/h_0*x) + A^2*(4/(sqrt(3) + 2))
    if x ≥ 0
        t ← A^2*(6/(sqrt(3) + 2))
# [plot: ρ_E(x_0, 1, 1, 1, 1) vs x_0]
U := 1
m := 1
Re(A*e^(1i*k_1*x) + A*e^(-1i*k_1*x))^2 + Im(A*e^(1i*k_1*x) + A*e^(-1i*k_1*x))^2 simplify, collect, A → A^2*4*cos(sqrt(3)*x)^2
Re(A*2*k_1/(k_1 + k_2)*e^(1i*k_2*x))^2 + Im(A*2*k_1/(k_1 + k_2)*e^(1i*k_2*x))^2 simplify, collect, A → 6/(sqrt(3) + 2)*A^2
k_1 := sqrt(2*m*3/2*U)/h
k_2 := sqrt(2*m*(3/2*U - U))/h
